<?xml version="1.0" encoding="UTF-8"?>
<networkml xmlns="http://morphml.org/networkml/schema" xmlns:meta="http://morphml.org/metadata/schema" xmlns:xsi="http://www.w3.org/2001/XMLSchema-instance" xsi:schemaLocation="http://morphml.org/networkml/schema  NetworkML_v1.7.2.xsd" lengthUnits="micron">

<meta:notes>

Network structure for project: Ex6-Cerebellum saved with neuroConstruct v1.1.2 on: 02:33:29, 29-Jul-08

Cell Group: PurkinjeCells contains 4 cells
Cell Group: GranuleCells contains 80 cells
Cell Group: MossyFibers contains 12 cells

Network connection: NetConn_2 contains 40 individual synaptic connections
Network connection: NetConn_1 contains 325 individual synaptic connections

</meta:notes>

<meta:properties>
    <meta:property>
        <meta:tag>neuroConstruct_random_seed</meta:tag>
        <meta:value>-2048165443</meta:value>
    </meta:property>
    <meta:property>
        <meta:tag>neuroConstruct_sim_config</meta:tag>
        <meta:value>Default Simulation Configuration</meta:value>
    </meta:property>
</meta:properties>

<populations>
    <population name="PurkinjeCells" cell_type="PurkinjeCell">
        <instances size="4">
            <instance id="0">
                <location x="134.98264" y="168.61089" z="96.32274"/>
            </instance>
            <instance id="1">
                <location x="64.09682" y="177.67873" z="39.81055"/>
            </instance>
            <instance id="2">
                <location x="52.58752" y="177.12222" z="153.20418"/>
            </instance>
            <instance id="3">
                <location x="94.33918" y="180.96149" z="63.304413"/>
            </instance>
        </instances>
    </population>
    <population name="GranuleCells" cell_type="GranuleCell">
        <instances size="80">
            <instance id="0">
                <location x="139.9279" y="122.767395" z="138.40897"/>
            </instance>
            <instance id="1">
                <location x="86.46357" y="128.61412" z="33.827496"/>
            </instance>
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        </instances>
    </population>
    <population name="MossyFibers" cell_type="MossyFiber">
        <instances size="12">
            <instance id="0">
                <location x="114.109215" y="109.12505" z="5.5826783"/>
            </instance>
            <instance id="1">
                <location x="155.70345" y="116.281555" z="63.306652"/>
            </instance>
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        </instances>
    </population>
</populations>

<projections units="Physiological Units">
    <projection name="NetConn_2" source="GranuleCells" target="PurkinjeCells">
        <synapse_props synapse_type="GranPurkSyn" internal_delay="7.5" weight="1.0" threshold="-20.0">
        </synapse_props>
        <connections>
            <connection id="0" pre_cell_id="0" pre_segment_id="25" pre_fraction_along="0.4214798" post_cell_id="2" post_segment_id="23" post_fraction_along="0.15224153">
                <properties prop_delay="0.03118715" internal_delay="9.766062" weight="1.0"/>
            </connection>
            <connection id="1" pre_cell_id="1" pre_segment_id="2" pre_fraction_along="0.089705944" post_cell_id="1" post_segment_id="24" post_fraction_along="0.14426392">
                <properties prop_delay="0.024054823" internal_delay="9.1016445" weight="1.0"/>
            </connection>
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        </connections>
    </projection>
    <projection name="NetConn_1" source="MossyFibers" target="GranuleCells">
        <synapse_props synapse_type="DoubExpSyn" internal_delay="7.5" weight="1.0" threshold="-20.0">
        </synapse_props>
        <connections>
            <connection id="0" pre_cell_id="10" pre_fraction_along="0.7646853" post_cell_id="0">
                <properties prop_delay="0.040492795" internal_delay="7.2427387" weight="1.0"/>
            </connection>
            <connection id="1" pre_cell_id="6" pre_fraction_along="0.11573082" post_cell_id="0">
                <properties prop_delay="0.055806413" internal_delay="7.2274446" weight="1.0"/>
            </connection>
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        </connections>
    </projection>
</projections>

<inputs units="Physiological Units">
    <input name="Input_0">
        <random_stim frequency="0.05000000074505806" synaptic_mechanism="DoubExpSyn"/>
        <target cell_group="MossyFibers">
            <sites>
                <site cell_id="1" segment_id="0" fraction_along="0.5"/>
                <site cell_id="4" segment_id="0" fraction_along="0.5"/>
                <site cell_id="9" segment_id="0" fraction_along="0.5"/>
                <site cell_id="5" segment_id="0" fraction_along="0.5"/>
                <site cell_id="6" segment_id="0" fraction_along="0.5"/>
                <site cell_id="11" segment_id="0" fraction_along="0.5"/>
                <site cell_id="3" segment_id="0" fraction_along="0.5"/>
                <site cell_id="2" segment_id="0" fraction_along="0.5"/>
                <site cell_id="10" segment_id="0" fraction_along="0.5"/>
                <site cell_id="8" segment_id="0" fraction_along="0.5"/>
                <site cell_id="7" segment_id="0" fraction_along="0.5"/>
                <site cell_id="0" segment_id="0" fraction_along="0.5"/>
            </sites>
        </target>
    </input>
</inputs>

</networkml>
