<?xml version="1.0" encoding="UTF-8" standalone="yes"?>
<neuroml lengthUnits="micron" xmlns="http://morphml.org/neuroml/schema">
    <cells>
        <cell name="5199202a">
            <ns1:notes xmlns:ns1="http://morphml.org/metadata/schema">Cell morphology generated by
                neuroConstruct from file: 5199202.CNG.swc Original file 5199202.out.swc edited by
                Duncan Donohue using StdSwc version 1.21 on 5/16/05. Irregularities and fixes
                documented in 5199202.out.swc.std. See StdSwc1.21.doc for more information. Amaral
                conversion fix by Duncan Donohue Types 3 and 4 switched Claiborne to SWC conversion
                from L-Measure. R. Scorcioni: rscorcio@gmu.edu Original
                fileName:D:\ded\p5\Archive\DG\Claiborne\5199202.out </ns1:notes>
            <ns2:segments xmlns:ns2="http://morphml.org/morphml/schema">
                <ns2:segment cable="0" id="0" name="Comp_1">
                    <ns2:proximal diameter="4.2261" x="0.0" y="0.0" z="0.0"/>
                    <ns2:distal diameter="4.2261" x="0.0" y="0.0" z="0.0"/>
                </ns2:segment>
                <ns2:segment cable="1" id="1" name="Comp_2" parent="0">
                    <ns2:proximal diameter="2.95" x="0.0" y="0.0" z="0.0"/>
                    <ns2:distal diameter="2.95" x="-0.13" y="9.14" z="-2.64"/>
                </ns2:segment>
                <ns2:segment cable="1" id="2" name="Comp_3" parent="1">
                    <ns2:distal diameter="2.95" x="0.2" y="11.85" z="-3.29"/>
                </ns2:segment>
                <ns2:segment cable="2" id="3" name="Comp_4" parent="2">
                    <ns2:proximal diameter="1.97" x="0.2" y="11.85" z="-3.29"/>
                    <ns2:distal diameter="1.97" x="2.83" y="14.8" z="-1.45"/>
                </ns2:segment>
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            </ns2:segments>
            <ns3:cables xmlns:ns3="http://morphml.org/morphml/schema">
                <ns3:cable fractAlongParent="0.0" fract_along_parent="0.0" id="0" name="Soma">
                    <ns4:group xmlns:ns4="http://morphml.org/metadata/schema">all</ns4:group>
                    <ns5:group xmlns:ns5="http://morphml.org/metadata/schema">soma_group</ns5:group>
                    <ns6:group xmlns:ns6="http://morphml.org/metadata/schema"
                    >Colour_White</ns6:group>
                </ns3:cable>
                <ns3:cable fractAlongParent="0.5" fract_along_parent="0.0" id="1" name="Sec_Comp_2">
                    <ns7:group xmlns:ns7="http://morphml.org/metadata/schema">all</ns7:group>
                    <ns8:group xmlns:ns8="http://morphml.org/metadata/schema">dendrite_group</ns8:group>
                    <ns9:group xmlns:ns9="http://morphml.org/metadata/schema"
                    >Colour_Green</ns9:group>
                </ns3:cable>
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            </ns3:cables>
        </cell>
        <cell name="cell2zr">
            <ns118:notes xmlns:ns118="http://morphml.org/metadata/schema">Cell morphology generated
                by neuroConstruct from file: cell2zr.CNG.swc Original file cell2zr.txt.swc edited by
                Duncan Donohue using StdSwc version 1.21 on 5/25/05. Irregularities and fixes
                documented in cell2zr.txt.swc.std. See StdSwc1.21.doc for more information. Amaral
                to SWC conversion from L-Measure. R. Scorcioni: rscorcio@gmu.edu Original
                fileName:H:\\cells\\ca3\\henze\\cell2zr.txt </ns118:notes>
            <ns119:segments xmlns:ns119="http://morphml.org/morphml/schema">
                <ns119:segment cable="0" id="0" name="Comp_1">
                    <ns119:proximal diameter="13.94206" x="-0.95" y="22.3667" z="0.0"/>
                    <ns119:distal diameter="13.94206" x="-0.95" y="22.3667" z="0.0"/>
                </ns119:segment>
                <ns119:segment cable="1" id="1" name="Comp_2" parent="0">
                    <ns119:proximal diameter="4.4" x="-0.95" y="22.3667" z="0.0"/>
                    <ns119:distal diameter="4.4" x="0.0" y="0.0" z="0.0"/>
                </ns119:segment>
                <ns119:segment cable="1" id="2" name="Comp_3" parent="1">
                    <ns119:distal diameter="4.4" x="3.0" y="3.0" z="-7.5"/>
                </ns119:segment>
                <ns119:segment cable="1" id="3" name="Comp_4" parent="2">
                    <ns119:distal diameter="3.6" x="8.0" y="-6.0" z="-7.5"/>
                </ns119:segment>
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            </ns119:segments>
            <ns120:cables xmlns:ns120="http://morphml.org/morphml/schema">
                <ns120:cable fractAlongParent="0.0" fract_along_parent="0.0" id="0" name="Soma">
                    <ns121:group xmlns:ns121="http://morphml.org/metadata/schema">all</ns121:group>
                    <ns122:group xmlns:ns122="http://morphml.org/metadata/schema">soma_group</ns122:group>
                    <ns123:group xmlns:ns123="http://morphml.org/metadata/schema"
                    >Colour_White</ns123:group>
                </ns120:cable>
                <ns120:cable fractAlongParent="0.5" fract_along_parent="0.0" id="1"
                    name="Sec_Comp_2">
                    <ns124:group xmlns:ns124="http://morphml.org/metadata/schema">all</ns124:group>
                    <ns125:group xmlns:ns125="http://morphml.org/metadata/schema">Colour_DarkGrey</ns125:group>
                    <ns126:group xmlns:ns126="http://morphml.org/metadata/schema"
                    >axon_group</ns126:group>
                </ns120:cable>
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            </ns120:cables>
        </cell>
        <cell name="cell1zr">
            <ns739:notes xmlns:ns739="http://morphml.org/metadata/schema">Cell morphology generated
                by neuroConstruct from file: cell1zr.CNG.swc Original file cell1zr.txt.swc edited by
                Duncan Donohue using StdSwc version 1.21 on 5/25/05. Irregularities and fixes
                documented in cell1zr.txt.swc.std. See StdSwc1.21.doc for more information. Amaral
                to SWC conversion from L-Measure. R. Scorcioni: rscorcio@gmu.edu Original
                fileName:H:\\cells\\ca3\\henze\\cell1zr.txt ORIGINAL_SOURCE CREATURE REGION
                FIELD/LAYER TYPE CONTRIBUTOR REFERENCE RAW EXTRAS SOMA_AREA SHRINKAGE_CORRECTION
                VERSION_NUMBER VERSION_DATE ********************************************* SCALE 1.0
                1.0 1.0 </ns739:notes>
            <ns740:segments xmlns:ns740="http://morphml.org/morphml/schema">
                <ns740:segment cable="0" id="0" name="Comp_1">
                    <ns740:proximal diameter="13.206" x="-1.135" y="21.0" z="1.692"/>
                    <ns740:distal diameter="13.206" x="-1.135" y="21.0" z="1.692"/>
                </ns740:segment>
                <ns740:segment cable="1" id="1" name="Comp_2" parent="0">
                    <ns740:proximal diameter="1.8" x="-1.135" y="21.0" z="1.692"/>
                    <ns740:distal diameter="1.8" x="0.0" y="0.0" z="0.0"/>
                </ns740:segment>
                <ns740:segment cable="1" id="2" name="Comp_3" parent="1">
                    <ns740:distal diameter="1.8" x="-1.5" y="0.0" z="-2.0"/>
                </ns740:segment>
                <ns740:segment cable="1" id="3" name="Comp_4" parent="2">
                    <ns740:distal diameter="1.8" x="-2.5" y="-6.5" z="-2.0"/>
                </ns740:segment>
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            </ns740:segments>
            <ns741:cables xmlns:ns741="http://morphml.org/morphml/schema">
                <ns741:cable fractAlongParent="0.0" fract_along_parent="0.0" id="0" name="Soma">
                    <ns742:group xmlns:ns742="http://morphml.org/metadata/schema">all</ns742:group>
                    <ns743:group xmlns:ns743="http://morphml.org/metadata/schema">soma_group</ns743:group>
                    <ns744:group xmlns:ns744="http://morphml.org/metadata/schema"
                    >Colour_White</ns744:group>
                </ns741:cable>
                <ns741:cable fractAlongParent="0.5" fract_along_parent="0.0" id="1"
                    name="Sec_Comp_2">
                    <ns745:group xmlns:ns745="http://morphml.org/metadata/schema">all</ns745:group>
                    <ns746:group xmlns:ns746="http://morphml.org/metadata/schema">Colour_DarkGrey</ns746:group>
                    <ns747:group xmlns:ns747="http://morphml.org/metadata/schema"
                    >axon_group</ns747:group>
                </ns741:cable>
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            </ns741:cables>
        </cell>
        <cell name="cell6zr">
            <ns1264:notes xmlns:ns1264="http://morphml.org/metadata/schema">Cell morphology
                generated by neuroConstruct from file: cell6zr.CNG.swc Original file cell6zr.txt.swc
                edited by Duncan Donohue using StdSwc version 1.21 on 5/25/05. Irregularities and
                fixes documented in cell6zr.txt.swc.std. See StdSwc1.21.doc for more information.
                Amaral to SWC conversion from L-Measure. R. Scorcioni: rscorcio@gmu.edu Original
                fileName:H:\\cells\\ca3\\henze\\cell6zr.txt </ns1264:notes>
            <ns1265:segments xmlns:ns1265="http://morphml.org/morphml/schema">
                <ns1265:segment cable="0" id="0" name="Comp_1">
                    <ns1265:proximal diameter="16.70514" x="4.0625" y="14.9375" z="-50.9583"/>
                    <ns1265:distal diameter="16.70514" x="4.0625" y="14.9375" z="-50.9583"/>
                </ns1265:segment>
                <ns1265:segment cable="1" id="1" name="Comp_2" parent="0">
                    <ns1265:proximal diameter="1.6" x="4.0625" y="14.9375" z="-50.9583"/>
                    <ns1265:distal diameter="1.6" x="0.0" y="0.0" z="-43.0"/>
                </ns1265:segment>
                <ns1265:segment cable="1" id="2" name="Comp_3" parent="1">
                    <ns1265:distal diameter="1.6" x="13.5" y="-17.5" z="-43.0"/>
                </ns1265:segment>
                <ns1265:segment cable="1" id="3" name="Comp_4" parent="2">
                    <ns1265:distal diameter="1.3" x="13.5" y="-29.0" z="-51.0"/>
                </ns1265:segment>
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            </ns1265:segments>
            <ns1266:cables xmlns:ns1266="http://morphml.org/morphml/schema">
                <ns1266:cable fractAlongParent="0.0" fract_along_parent="0.0" id="0" name="Soma">
                    <ns1267:group xmlns:ns1267="http://morphml.org/metadata/schema">all</ns1267:group>
                    <ns1268:group xmlns:ns1268="http://morphml.org/metadata/schema">soma_group</ns1268:group>
                    <ns1269:group xmlns:ns1269="http://morphml.org/metadata/schema"
                    >Colour_White</ns1269:group>
                </ns1266:cable>
                <ns1266:cable fractAlongParent="0.5" fract_along_parent="0.0" id="1"
                    name="Sec_Comp_2">
                    <ns1270:group xmlns:ns1270="http://morphml.org/metadata/schema">all</ns1270:group>
                    <ns1271:group xmlns:ns1271="http://morphml.org/metadata/schema">Colour_DarkGrey</ns1271:group>
                    <ns1272:group xmlns:ns1272="http://morphml.org/metadata/schema"
                    >axon_group</ns1272:group>
                </ns1266:cable>
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            </ns1266:cables>
        </cell>
    </cells>
    <ns1772:populations xmlns:ns1772="http://morphml.org/networkml/schema">
        <ns1772:population cell_type="5199202a" name="5199202a">
            <ns1772:instances size="2">
                <ns1772:instance id="4005456686101753221">
                    <ns1772:location x="283.484130859375" y="-122.968017578125"
                        z="-208.6137237548828"/>
                    <ns1772:curveAssociation curveId="3227" time="0.6930000185966492"/>
                    <ns1772:rotation w="-0.9817028045654297" x="0.0" y="0.0"
                        z="-0.19042310118675232"/>
                    <ns1772:scale x="0.01000005193054676" y="0.01000005193054676"
                        z="0.01000005193054676"/>
                </ns1772:instance>
                <ns1772:instance id="-5968580885808502461">
                    <ns1772:location x="493.5133056640625" y="-162.097412109375"
                        z="-239.33383178710938"/>
                    <ns1772:curveAssociation curveId="2846" time="0.5"/>
                    <ns1772:rotation w="1.0" x="0.0" y="0.0" z="0.0"/>
                    <ns1772:scale x="0.009999880567193031" y="0.009999880567193031"
                        z="0.009999880567193031"/>
                </ns1772:instance>
            </ns1772:instances>
        </ns1772:population>
        <ns1772:population cell_type="cell2zr" name="cell2zr">
            <ns1772:instances size="1">
                <ns1772:instance id="-4964806985883347383">
                    <ns1772:location x="282.3434753417969" y="-94.0207290649414"
                        z="-160.9170684814453"/>
                    <ns1772:curveAssociation curveId="2849" time="0.5300002694129944"/>
                    <ns1772:rotation w="1.0" x="0.0" y="0.0" z="0.0"/>
                    <ns1772:scale x="0.010000305250287056" y="0.010000305250287056"
                        z="0.010000305250287056"/>
                </ns1772:instance>
            </ns1772:instances>
        </ns1772:population>
        <ns1772:population cell_type="cell1zr" name="cell1zr">
            <ns1772:instances size="1">
                <ns1772:instance id="9094267317770232332">
                    <ns1772:location x="283.1292419433594" y="-90.33002471923828"
                        z="-175.26019287109375"/>
                    <ns1772:curveAssociation curveId="2849" time="0.6449999809265137"/>
                    <ns1772:rotation w="1.0" x="0.0" y="0.0" z="0.0"/>
                    <ns1772:scale x="0.010000031441450119" y="0.010000031441450119"
                        z="0.010000031441450119"/>
                </ns1772:instance>
            </ns1772:instances>
        </ns1772:population>
        <ns1772:population cell_type="cell6zr" name="cell6zr">
            <ns1772:instances size="1">
                <ns1772:instance id="2480143055938152769">
                    <ns1772:location x="282.9237060546875" y="-117.47029876708984"
                        z="-144.60789489746094"/>
                    <ns1772:curveAssociation curveId="2849" time="0.30000001192092896"/>
                    <ns1772:rotation w="1.0" x="0.0" y="0.0" z="0.0"/>
                    <ns1772:scale x="0.020000305026769638" y="0.020000305026769638"
                        z="0.020000305026769638"/>
                </ns1772:instance>
            </ns1772:instances>
        </ns1772:population>
    </ns1772:populations>
    <curves>
        <curve id="3227" name="Dentate Gyrus">
            <ns1776:point x="283.1846618652344" y="-113.51780700683594" z="-170.38356018066406"
                xmlns:ns1776="http://morphml.org/metadata/schema"/>
            <ns1777:point x="283.2021179199219" y="-111.67999267578125" z="-182.74415588378906"
                xmlns:ns1777="http://morphml.org/metadata/schema"/>
            <ns1778:point x="282.7076721191406" y="-122.09807586669922" z="-209.2460479736328"
                xmlns:ns1778="http://morphml.org/metadata/schema"/>
            <ns1779:point x="282.3287048339844" y="-125.42066955566406" z="-167.7481689453125"
                xmlns:ns1779="http://morphml.org/metadata/schema"/>
        </curve>
        <curve id="2849" name="CA">
            <ns1780:point x="279.08184814453125" y="-121.4308090209961" z="-164.42845153808594"
                xmlns:ns1780="http://morphml.org/metadata/schema"/>
            <ns1781:point x="282.7882080078125" y="-121.27982330322266" z="-144.3096160888672"
                xmlns:ns1781="http://morphml.org/metadata/schema"/>
            <ns1782:point x="282.2539367675781" y="-95.71465301513672" z="-157.989990234375"
                xmlns:ns1782="http://morphml.org/metadata/schema"/>
            <ns1783:point x="283.5340576171875" y="-90.33613586425781" z="-188.8362579345703"
                xmlns:ns1783="http://morphml.org/metadata/schema"/>
            <ns1784:point x="281.62030029296875" y="-102.40320587158203" z="-216.03736877441406"
                xmlns:ns1784="http://morphml.org/metadata/schema"/>
        </curve>
    </curves>
    <slides>
        <slide>
            <name>cerebImage</name>
            <position x="468.40594482421875" y="-117.42851257324219" z="-249.7540740966797"/>
            <rotation w="0.9848077893257141" x="-0.0" y="-0.0" z="-0.1736481785774231"/>
            <scale x="3.71000075340271" y="3.71000075340271" z="3.71000075340271"/>
            <id>0</id>
            <imageURL>http://ccdb.ucsd.edu/sand/main?event=rd&amp;type=512v&amp;mpid=53</imageURL>
            <ratio>1.1100000143051147</ratio>
        </slide>
        <slide>
            <name>striatum 1</name>
            <position x="200.128173828125" y="-153.4557647705078" z="-144.00071716308594"/>
            <rotation w="0.7071067690849304" x="0.0" y="-0.7071067690849304" z="0.0"/>
            <scale x="9.960002899169922" y="9.960002899169922" z="9.960002899169922"/>
            <id>0</id>
            <imageURL>/etc/img/striatum1.jpg</imageURL>
            <ratio>1.3300000429153442</ratio>
        </slide>
        <slide>
            <name>hippo3c</name>
            <position x="282.7668151855469" y="-114.47135162353516" z="-159.03135681152344"/>
            <rotation w="0.7316893935203552" x="0.0" y="-0.6816388368606567" z="0.0"/>
            <scale x="0.699999988079071" y="0.699999988079071" z="0.699999988079071"/>
            <id>0</id>
            <imageURL>/etc/img/hippo_slice3c.jpg</imageURL>
            <ratio>1.3300000429153442</ratio>
        </slide>
        <slide>
            <name>hippocampus 2</name>
            <position x="332.5680236816406" y="-160.00669860839844" z="-139.4047393798828"/>
            <rotation w="0.7071067690849304" x="0.0" y="-0.7071067690849304" z="0.0"/>
            <scale x="11.280001640319824" y="11.280001640319824" z="11.280001640319824"/>
            <id>0</id>
            <imageURL>/etc/img/hippo2.jpg</imageURL>
            <ratio>0.8700000047683716</ratio>
        </slide>
        <slide>
            <name>CCDBSlide 35</name>
            <position x="291.7175598144531" y="-156.13571166992188" z="-135.4983367919922"/>
            <rotation w="-0.7373945713043213" x="0.0" y="0.6754647493362427" z="0.0"/>
            <scale x="11.959997177124023" y="11.959997177124023" z="11.959997177124023"/>
            <id>0</id>
            <imageURL>http://ccdb.ucsd.edu/sand/main?event=rd&amp;type=512v&amp;mpid=35</imageURL>
            <ratio>0.8700000047683716</ratio>
        </slide>
        <slide>
            <name>Waldo</name>
            <position x="284.904052734375" y="-114.38167572021484" z="-181.4795379638672"/>
            <rotation w="-0.7259314060211182" x="0.0" y="0.6877681612968445" z="0.0"/>
            <scale x="3.8399972915649414" y="3.8399972915649414" z="3.8399972915649414"/>
            <id>0</id>
            <imageURL>/etc/img/hippo_slice2.jpg</imageURL>
            <ratio>1.340000033378601</ratio>
        </slide>
        <slide>
            <name>user-created slide</name>
            <position x="452.0797424316406" y="-179.35891723632812" z="-284.4769287109375"/>
            <rotation w="0.05183792859315872" x="0.1765495091676712" y="0.9727513194084167"
                z="-0.14106039702892303"/>
            <scale x="2.7699997425079346" y="2.7699997425079346" z="2.7699997425079346"/>
            <id>-1365852632383276695</id>
            <imageURL>/etc/img/sw-awesome.jpg</imageURL>
            <ratio>1.0</ratio>
        </slide>
        <slide>
            <name>hippo3b</name>
            <position x="285.75311279296875" y="-114.51262664794922" z="-180.00192260742188"/>
            <rotation w="-0.737393856048584" x="0.0" y="0.6754632592201233" z="0.0"/>
            <scale x="0.8000002503395081" y="0.8000002503395081" z="0.8000002503395081"/>
            <id>0</id>
            <imageURL>/etc/img/hippo_slice3b.jpg</imageURL>
            <ratio>1.309999942779541</ratio>
        </slide>
        <slide>
            <name>hippo3a</name>
            <position x="284.44635009765625" y="-120.85203552246094" z="-205.34542846679688"/>
            <rotation w="-0.7702319025993347" x="0.0" y="0.6377649307250977" z="0.0"/>
            <scale x="1.0" y="1.0" z="1.0"/>
            <id>0</id>
            <imageURL>/etc/img/hippo_slice3a.jpg</imageURL>
            <ratio>1.3300000429153442</ratio>
        </slide>
    </slides>
</neuroml>
